## Boomerangbjælke
# Et forslag til tagkonstruktionen er et tag udformet som en boomerangbjælke, som er en sadelformet bjælke med krum underside på midten.
#
# Boomerangbjælken ønskes udført i GL28h, og dimensioneret efter dens højde. Boomerangbjælken vil blive undersøgt for moment- og forskydningsbæreevne, samt vederlagstryk og tværtrækspændinger.
# Bjælkegeometri:
# Spændvidde:
l := 12 m
# Tykkelsen af bjælke:
b := 140 mm
# Lameltykkelse:
t := 33.3 mm
# Højde bjælke:
h := 20*t = 666 mm
# Hældning af bjælke:
α_ap := 6 deg
# Indvendig radius
r_in := 2/3*l = 8 m
667 mm + 1000 mm*tan(3.7 deg) - 9000 mm/(1/(cos(6.3 deg) - 1)) = 786.019 mm
# Udbredelse af toppunktszone:
l_BC := 2/3*l*sin(α_ap) = 836.228 mm
# Højden til toppunkt:
h_ap := h + l_BC*tan(α_ap) - r_in/(1/(cos(α_ap) - 1)) = 797.716 mm
h_ap2 := 697.23 mm  # (Malthe)
# ???:
r := r_in + 0.5*h_ap = 8.39886 m
# ???:
r_mid := r + 0.5*h_ap = 8.79772 m
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# Karakteriske styrkeparametre:
# Bøjningsstyrke:
f_m.k := 28 MPa
# Forskydningsstyrke:
f_v.k := 3.5 MPa
# Træk vinkelret på fiberretning:
f_t.90.d := 0.5 MPa
# Partialkoefficient:
γ_M := 1.3
# Regningsmæssige styrkeparametre, P-last:
# Modifikationsfaktor:
k_mod := 0.6
f_m.d.P := k_mod*f_m.k/γ_M = 12.9231 MPa
f_v.d.P := k_mod*f_v.k/γ_M = 1.61538 MPa
f_t.90.d.P := k_mod*f_t.90.d/γ_M = 0.230769 MPa
# Regningsmæssige styrkeparametre, K-last:
# Modifikationsfaktor:
k_mod := 0.9
f_m.d.K := k_mod*f_m.k/γ_M = 19.3846 MPa
f_v.d.K := k_mod*f_v.k/γ_M = 2.42308 MPa
f_t.90.d.K := k_mod*f_t.90.d/γ_M = 0.346154 MPa
# Regningsmæssige styrkeparametre, Ø-last:
# Modifikationsfaktor:
k_mod := 1.1
f_m.d.Ø := k_mod*f_m.k/γ_M = 23.6923 MPa
f_v.d.Ø := k_mod*f_v.k/γ_M = 2.96154 MPa
f_t.90.d.Ø := k_mod*f_t.90.d/γ_M = 0.423077 MPa
# Lastkombinationer:
# Regningsmæssig last:
q_d := 10*kN/m
# Forskydningskraft:
V_max := (l/2 - h)*q_d*cos(α_ap) = 53.0478 kN
# Moment:
M_max := 1/8*q_d*l^2 = 180 kN*m
# Boomerangbjælkens tværsnits bøjningsstyrke reduceres ikke, da bjælken har en konstant højde. Det betyder der er ingen renskårne sider, og styrkereduktionsfaktoren, k_m.α, ikke indgår i beregningerne.
σ_m.α.d := M_max/(1/6*b*h^2) = 17.3919 MPa
BE_σ.1 :=
    "OK" if σ_m.α.d ≤ f_m.d.P
    "FEJL" otherwise
    = "FEJL"
U_σ.1 := σ_m.α.d/f_m.d.P = 1.3458
BE_σ.2 :=
    "OK" if σ_m.α.d ≤ f_m.d.K
    "FEJL" otherwise
    = "OK"
U_σ.2 := σ_m.α.d/f_m.d.K = 0.897202
BE_σ.3 :=
    "OK" if σ_m.α.d ≤ f_m.d.Ø
    "FEJL" otherwise
    = "OK"
U_σ.3 := σ_m.α.d/f_m.d.Ø = 0.734074
k_1 := 1 + 1.4*tan(α_ap) + 5.4*tan(α_ap)^2 = 1.2068
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k_2 := 0.35 - 8*tan(α_ap) = -0.490834
k_3 := 0.6 + 8.3*tan(α_ap) - 7.8*tan(α_ap)^2 = 1.3862
k_4 := 6*tan(α_ap)^2 = 0.0662814
k_l := k_1 + k_2*(h_ap/r_in)*k_3*(h_ap/r_in)^2 + k_4*(h_ap/r_in)^4 = 1.20613
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σ_m.i.d := k_l*M_max/(1/6*b*h_ap^2) = 14.6216 MPa
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k_r :=
    1 if r/t ≥ 240
    0.76 + 0.001*r/t if r/t < 240
    = 1
BE_σ.1 :=
    "OK" if σ_m.i.d ≤ k_r*f_m.d.P
    "FEJL" otherwise
    = "FEJL"
U_σ.1 := σ_m.i.d/(k_r*f_m.d.P) = 1.13143
BE_σ.2 :=
    "OK" if σ_m.i.d ≤ k_r*f_m.d.K
    "FEJL" otherwise
    = "OK"
U_σ.2 := σ_m.i.d/(k_r*f_m.d.K) = 0.754287
BE_σ.3 :=
    "OK" if σ_m.i.d ≤ k_r*f_m.d.Ø
    "FEJL" otherwise
    = "OK"
U_σ.3 := σ_m.i.d/(k_r*f_m.d.Ø) = 0.617144
# Tværtrækspændinger i toppunktzonen:
k_5 := 0.2*tan(α_ap) = 0.0210208
k_6 := 0.025 - 1.5*tan(α_ap) + 2.6*tan(α_ap)^2 = -0.103934
k_7 := 2.1*tan(α_ap) - 4*tan(α_ap)^2 = 0.176531
k_p := k_5 + k_6*(h_ap/r_mid) + k_7*(h_ap/r_mid)^2 = 0.0130482
# Tværtrækspænding:
σ_t.90.d := k_p*6*M_max/(b*h_ap^2) - 0.6*q_d/b = 0.115322 MPa
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# Bjælkens samlede volumen:
V_b := 1 m^3
# Tværtrækpåvirket volumen:
V := min([2/3*V_b; b*(sin(α_ap)*cos(α_ap)*(r_in + h_ap)^2 - r_in^2*α_ap*π/180)]) = 666.667 L
V := b*(sin(α_ap)*cos(α_ap)*(r_in + h_ap)^2 - r_in^2*α_ap*π/180) = 1.11009 m^3
# Referencevolumet:
V_ref := 0.01 m^3
# ???:
V_f := 1.7*(V_ref/V)^0.2 = 0.662792
BE_σ.1 :=
    "OK" if σ_t.90.d ≤ V_f*f_t.90.d.P
    "FEJL" otherwise
    = "OK"
U_σ.1 := σ_t.90.d/(V_f*f_t.90.d.P) = 0.753973
BE_σ.2 :=
    "OK" if σ_t.90.d ≤ V_f*f_t.90.d.K
    "FEJL" otherwise
    = "OK"
U_σ.2 := σ_t.90.d/(V_f*f_t.90.d.K) = 0.502649
BE_σ.3 :=
    "OK" if σ_t.90.d ≤ V_f*f_t.90.d.Ø
    "FEJL" otherwise
    = "OK"
U_σ.3 := σ_t.90.d/(V_f*f_t.90.d.Ø) = 0.411258
# Forskydningsbæreevne:
τ_d := 1.5*V_max/(b*h) = 0.853407 MPa
BE_τ :=
    "OK" if τ_d ≤ f_v.d.P
    "FEJL" otherwise
    = "OK"
U_τ := τ_d/f_v.d.P = 0.5283
BE_τ :=
    "OK" if τ_d ≤ f_v.d.K
    "FEJL" otherwise
    = "OK"
U_τ := τ_d/f_v.d.K = 0.3522
BE_τ :=
    "OK" if τ_d ≤ f_v.d.Ø
    "FEJL" otherwise
    = "OK"
U_τ := τ_d/f_v.d.Ø = 0.288164
# Forskydningsstyrken ved understøtningen er tilstrækkelig.
# Momentbæreevne:
# Vederlagstryk:
# Udtryk for udbøjning:
y(x) := 1/24*q_a*L^4/(E*I_y)*((1 - 2*(a/L)^2)*(x/L) - 2*(1 - (a/L)^2)*(x/L)^3 + (x/L)^4)  # error: This variable is undefined.
# Gæt: | Finder max værdi: | Aktuelt angrebspunkt:
x := 0
Maximize(y, x) =  # error: This variable is undefined.
x := 3.451 m
M(x) := 0.5*10*x*(10 - x)
x := 0
Maximize(M, x) = 5
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