## Længdestabilitet
# Længdestabilitetten sikres ved skiver aller vindkryds i facadevæggene i bygningens midte. Begge løsninger undersøges i dette regneark.
# Højde af bygning
h_1 := 7.1 m
# Væghøjde:
h_2 := 5.5 m
# Dimension på tværs af vind:
b := 24 m
# Søjleafstand:
b_1 := 4 m
# Kantafstand
e := min([b; 2*h]) = 14.2 m  # error: This variable is undefined.
# Dimension parallelt med vind:
d := 12 m
"e < d" if e < d
"e > d" if e > d =  # error: This variable is undefined.
# Peakhastighedsudtryk:
q_p := 0.77*kN/m^2
# Formfaktor, side D + korrelation:
c_pe.1 := 0.71*0.85 = 0.6035
# Vindtryk, tryk:
w_e.1 := q_p*c_pe.1 = 0.464695 kN/m^2
# Formfaktor, side E + korrelation:
c_pe.2 := -0.31*0.85 = -0.2635
# Vindtryk, sug:
w_e.2 := q_p*c_pe.2 = -0.202895 kN/m^2
# Lastoplandet for vindlasten på gavlen, som skal stabiliseres af midtervæggene i facaderne udgør halvdelen af gavlvæggens øvre halvdel.
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# Lastopland:
L_o := h_2/2*d/2 + (h_1 - h_2)/2*d/2 = 21.3 m^2
# Dermed kan den samlede vandrette kraft beregnes, som bliver projikteret ned på vindbåndenes hældning:
# Dimensionsgivende kraft:
F := w_e.1*L_o + |w_e.2|*L_o = 14.2197 kN
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# Hældning på vindkryds:
α := atan(h_2/(2*b_1)) = 34.5085 deg
# Karakteristisk trækkraft:
F_t.K := F/cos(α) = 17.256 kN
# Konsekvensklasse:
K_FI := 1.0
# Regningsmæssig trækkraft:
F_t.R := F_t.K*1.50*K_FI = 25.884 kN
# Dermed er den regningsmæssige last, Ft.R, beregnet, og den regningsmæssige bæreevne, Rd, kan dermed bestemmes ved opslag i tabel fra Simpsons-StrongTie. Bæreevnetabellen ses af nedenstående:
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# I henhold til Simpson-StrongTie regnes vindafstivningen i brudgrænsetilstanden, så den karakteristiske bæreevne, R_1.k, skal reduceres med en partialkoefficient.
# Karakteristisk bæreevne:
R_1.k := 35.6 kN
# Partialkoefficient, kontrolklasse:
γ_3 := 1.0
# Partialkoefficient, :
γ_M := 1.35*γ_3 = 1.35
# Regningsmæssig bæreevne:
R_d := R_1.k/γ_M = 26.3704 kN
# Dermed er både den regningsmæssige last, F_t.R, og den regningsmæssige bæreevne, R_d, bestemt, og bæreevnen, , eftervises. Trækbåndet udnyttelsesgrad, U, bestemmes ligeledes
# Bæreevneeftervisning:
BE :=
    "OK!" if F_t.R ≤ R_d
    "FEJL!" otherwise
    = "OK!"
# Udnyttelsesgraden:
U := F_t.R/R_d = 0.981556
