## Snelast
# Snelasten regnes i henhold til DS/EN 1991-1-3 - Snelast, og tager udgangspunkt i hældningen og højden på gitterspærret.
# Bygningsgeometri:
# Højde af bygningen:
h_1 := 7.1 m
# Bredde af bygningen:
b := 24 m
# Dybde af bygningen:
d := 12 m
# [DS/EN 1991-1-3, figur 5.1]
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# Hældning på tag
α := 15
# Først bestemmes formfaktoren, μ_i, for snelast på et sadeltag, i henhold til tabel 5.2 i DS/EN 1991-1-3.
# Formfaktor:
μ_i :=
    0.8 if 0 ≤ α ≤ 30
    0.8*(60 - α)/30 if 30 < α < 60
    0.0 if 60 ≤ α
    = 0.8
# Eksponeringsfaktoren, C_e, afhænger af omgivelsernes topografi, C_top, som bliver vurderet ud fra nedenstående figur. I indeværende projekt vurderes hallen at ligge i et område med normal topografi.
# Omgivelsernes topografi:
C_top := 1.0
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# [DS/EN 1991-1-3, tabel 5.1]
# Eksponeringsfaktoren, C_e, afhænger desuden af en faktor for konstruktionens størrelse, C_ss, i henhold til DS/EN 1991-1-3 DK NA:2015 5.2(7). To gange højden er mindre end bygningens bredde, så C_ss, bestemmes af nedenstående
# Konstruktionens størrelse:
C_ss :=
    1.0 if d ≤ 10*h_1
    1 + 0.025*(d - 10*h_1)/h_1 if 10*h_1 < d < 20*h_1
    1.25 if d ≥ 20*h_1
    = 1
# Dermed kan eksponeringsfaktoren, C_e, beregnes:
# Eksponeringsfaktoren:
C_e := C_top*C_ss = 1
# Den termiske faktor, C_t, tager højde for virkninigen af varmetab gennem taget, da det vil reducere snelasten. Ved normal varmeisolering forudsættes den termiske faktor, C_t, at være lig 1.0
# Termisk faktor:
C_t := 1.0
# Den karakteristiske terrænværdi, s_k, er bestemt af Danmarks Meteorologiske Institut ved maåling af snemængder i Danmark over en lang periode. Den er i DS/EN 1991-1-3 DK NA:2015 4.1(1) anført til 1.0 kN/m^2
# Karakteriske terrænværdi:
s_k := 1.0*kN/m^2
# Dermed kan den karakteristiske snelast, s, på hallens saddeltag bestemmes.
# Snelast på tage:
s := μ_i*C_e*C_t*s_k = 0.8 kN/m^2
# Den karakteristiske snelast, s, på hallens tag er 0.8 kN/m^2
