## Vindlast
# Vindlasten bliver beregnet i henhold til DS/EN 1991-1-4.
# Basisvindhastigheden, v_b, er oplyst i projektmaterialet til 24 m/s. Denne grundværdi er specificeret overalt i Danmark bortset fra en randzone i Jylland, der ligger mindre end 25 km fra Vesterhavet og Ringkøbing fjord.
# Basisvindhastigheden:
v_b := 24*m/s
# Luftdensitet:
ρ := 1.25*kg/m^3
# Det er ligeledes anført i projektmaterialet at bygningen henføres til terrænkategori II, som betyder det er et landbrugsland med læhegn, spredte små landbrugsbygninger, huse eller træer. Dermed kan både ruhedslængden, z_0, og reference ruhedslængden, z_0.II, sættes lig 0.05 m
# Ruhedslængden:
z_0 := 0.05 m
# Ref. ruhedslængde:
z_0.II := 0.05 m
# Bygningshøjde:
z := 7.1 m
# Terrænfaktor:
k_r := 0.19*(z_0/z_0.II)^0.07 = 0.19
# [DS/EN-1-4, tabel 4.1]
# Dermed kan det karakteristiske peakhastighedstryk, q_p, bestemmes:
# Peakhastighedstryk:
q_p := (1 + 7/ln(z/z_0))*1/2*ρ*(v_b*k_r*ln(z/z_0))^2 = 0.770026 kN/m^2
# [DS/EN-1-4, formel 4.8]
# Vindens peakhastighedstryk, q_p, bliver beregnet til 0.77 kN/m^2, som bliver adderet på hallens formfaktorer, som er udregnet i et seperat excel-fil, for at danne det karakteristiske vindtryk, w_e, som virker på konstruktionens ydre flader.
