# Worksheet setting: ORIGIN = 1
# Geração de série temporal das elevações do mar: Espectro Pierson-Moskovitz
Hs := 7.8  # Altura significativa de onda
Tz := 11.8  # Período cruzamento zero
B := (2*π/Tz)^4/π
A := B*Hs^2/4
Sp(w) := A/w^5*exp(-B/w^4)
w := 0, 0.01 .. 2
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# Intervalo de
# Frequências
# Intervalo de
# Tempo
# Tempo de
# Simulação
ωi := 0.2
Δt := 0.125
T := 10800
ωf := 2.0
Ts := T
T = 10800
# Momentos Espectrais
mo := integral(ω^0*Sp(ω), ω = ωi .. ωf)
m2 := integral(ω^2*Sp(ω), ω = ωi .. ωf)
m4 := integral(ω^4*Sp(ω), ω = ωi .. ωf)
mo = 3.79642
m2 = 1.02949
m4 = 0.570427
σ := sqrt(mo)
σ = 1.94844
ε := sqrt(1 - m2^2/(mo*m4))
ν_m := 1/(2*π)*sqrt(m4/m2)
ν_m = 0.11847
ν_o := 1/(2*π)*sqrt(m2/mo)
ν_o = 0.0828789
ε = 0.714558  # Largura de banda
# Relação entre Hs e m_0
Hs/sqrt(mo) = 4.0032
# Estatística do Valor Extremo (amplitude da onda individual extrema)
u := sqrt(mo)*sqrt(2*ln(ν_o*T))
u = 7.18387
ν_o*T = 895.092
α := sqrt(2*ln(ν_o*T))*1/sqrt(mo)
α = 1.89227
μ_e := u + 0.5772/α
μ_e = 7.4889
σ_e := π/(sqrt(6)*α)
σ_e = 0.677782
fe(x) := exp(-α*(x - u) - exp(-α*(x - u)))
x := 5, 5.1 .. 14
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Hmax := 2*u
Hmax = 14.3677
Hmax/Hs = 1.84202
N := ν_o*T = 895.092  # Se fosse 1000 a relação seria 1.86!
# Geração de uma série temporal
# No de
# componentes
# Intervalo de
# frequência
Nω := 500
Δω := (ωf - ωi)/Nω
Δω = 0.0036
# Simulação no domínio do tempo
NP := T/Δt + 1
NP = 86401
i := 1, 2 .. NP
t[i] := (i - 1)*Δt
Serie(Nω, Δω, NP, Δt) :=
    ϕ ← runif(Nω, 0, 2*π)
    ϕω ← runif(Nω, 0, 1)
    for i ∈ 1, 2 .. Nω
        ωm[i] ← (Δω*(i - 1) + Δω*i + ωi*2)/2
        ω[i] ← ωi + Δω*(i - 1) + Δω*ϕω[i]
        A[i] ← sqrt(2*Sp(ωm[i])*Δω)
    for k ∈ 1, 2 .. NP
        t[k] ← (k - 1)*Δt
        y[k] ← sum(A[j]*cos(ω[j]*t[k] + ϕ[j]), j = 1 .. Nω)
    y
η := Serie(Nω, Δω, NP, Δt)
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# Distribuição de probabilidades do processo aleatório (comparação com a NORMAL)
ηo := sort(η)
μ_η := mean(η)
σ_η := stdev(η)
cdf[i] := i/(NP + 1)
Fη(η) := cnorm((η - μ_η)/σ_η)
μ_η = 0.000143603
σ_η = 1.96075
sqrt(mo) = 1.94844
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# Distribuição dos máximos - Distribuição de Rice
ν_o = 0.0828789
ε = 0.714558
fmax(η) := ε/(sqrt(mo)*sqrt(2*π))*exp(-1/2*η^2/mo) + η/mo*sqrt(1 - ε^2)*exp(-η^2/(2*mo))*cnorm(η/(mo*ε)*sqrt(1 - ε^2))
Fmax(η) := integral(fmax(x), x = -6 .. η)
# Distribuição a partir da amostra
# Rotina para
# separar os
# máximos
pm(x) :=
    N ← rows(x)
    v[1] ← 0
    v[N] ← 0
    for j ∈ 2, 3 .. N - 1
        i ← 0
        i ← 1 if (x[j - 1] < x[j]) and (x[j] > x[j + 1])
        v[j] ← i
    m ← 0
    for k ∈ 1, 2 .. N
        aux ← m
        m ← v[k] + aux
        p[m] ← x[k] if v[k] > 0
    p
# Histograma dos máximos
xm := pm(η)
Nint := 20
v := histogram(Nint, xm)
xx := v[:, 1]
Δ := xx[2] - xx[1]
Nm := rows(xm)
pdf := v[:, 2]/(Nm*Δ)
Δ = 0.503175
i := 1, 2 .. Nint
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max(xm) = 7.14184
xms := sort(xm)
# PDF
min(xm) = -2.92166
Nm := rows(xm)
Nm = 1281
j := 1, 2 .. Nm
cdfm[j] := j/(Nm + 1)
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# CDF
# Geração de uma amostra de valores extremos (processo demorado)
Sample_m(N) :=
    for j ∈ 1, 2 .. N
        xm[j] ← max(Serie(Nω, Δω, NP, Δt))
    xm
Nm := 20
xm := Sample_m(Nm)
xm = [8.04282; 6.79909; 6.37467; 7.14899; 8.22801; 8.19913; 8.13854; 7.11352; 7.06727; 8.63932; 7.00399; 7.36012; 6.83111; 6.94984; 7.25581; 7.29054; 8.51025; 7.97544; 6.89154; 7.30835]
mm := mean(xm)
sm := stdev(xm)
mm = 7.45642
sm = 0.631327
αm := π/(sqrt(6)*sm)
αm = 2.03151
um := mm - 0.5722/αm
um = 7.17476
# Valores Teóricos
μ_e = 7.4889
σ_e = 0.677782
u = 7.18387
α = 1.89227
i := 1, 2 .. Nm
xms := sort(xm)
Fms[i] := i/(Nm + 1)
Fm(x) := exp(-exp(-α*(x - u)))
# Cálculo da densidade espectral: FFT
NP = 86401
NC := 2^16  # Maior número de pontos que pode ser escrito como potência de 2
NC = 65536
i := 1, 2 .. NC
ηa[i] := η[i]
u := FFT(ηa)
ncoef := length(u) - 1
TC := (NC - 1)*Δt
Δw := 2*π/TC
k := 1, 2 .. ncoef
ncoef = 32768
w[k] := (k - 1)*Δw
an[k] := 2*Re(u[k])
bn[k] := -2*Im(u[k])
an[1] := 0.0
bn[1] := 0.0
SS[k] := (an[k]^2 + bn[k]^2)/(2*Δw)
sum((an[k]^2 + bn[k]^2)/2, k = 1 .. ncoef) = 3.81482
mo = 3.79642
j := 1, 2 .. 1600
S[j] := SS[j]
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# Suavização do Espectro
Hann(S, nvezes) :=
    Nw ← rows(S)
    for i ∈ 1, 2 .. nvezes
        SS ← S
        for j ∈ 2, 3 .. Nw - 1
            S[j] ← 0.5*SS[j] + 0.25*(SS[j - 1] + SS[j + 1])
    S
nvezes := 200
Snew := Hann(S, nvezes)
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# Função de Auto-correlação
NPP := 500
i := 0, 1 .. NPP
tt[i + 1] := i*Δt
R[i + 1] := sum(η[j]*η[j + i]/(NP - NPP), j = 1 .. NP - NPP)
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vs := lspline(tt, R)
Tm := tt[rows(tt)]
Tm = 62.5
RR(τ) := interp(vs, tt, R, τ)
τ := 0, 0.1 .. Tm
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S(w) := 4*integral(RR(τ)*cos(w*τ), τ = 0 .. Tm)/(2*π)
w := 0.1, 0.1125 .. 1.5
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